// COMSOL Multiphysics 6.1.0.282 model "Piezoelectric_Disc_plus_Material.mph"
// Outline of the model tree

Parameters
  d_disc = 25[mm]
  th = 0.83[mm]
  Fre_I = 2.3e6[Hz]
  Fre_F = 2.65e6[Hz]
  Step_Fre = 5000[Hz]
  Mesh_Size = th/10
  Fre_re = 2500e3[Hz]
  CE11 = 1 [Pa]
  CE33 = (1.176299099941295e+11 + 4.869749190479133e+06i)[Pa]  // Elasticity CE33
  CE12 = 1 [Pa]
  CE13 = 1 [Pa]
  CE44 = 1 [Pa]
  CE66 = (CE11-CE12)/2
  eE33 = (11.146046581945837 - 0.026152284646954i)[C/m^2]
  eE31 = 1[C/m^2]
  eE15 = 1[C/m^2]
  epsilon33r = 2.012791160000000000000000000000000000000000000665360e+03 - 1.235184610636028e+00i
  epsilon11r = 1
  rho_m = 7500[kg/m^3]
  V_input = 1[V]
  rho_so = 1128.34[kg/m ^3]
  Km = 3.67[GPa]
  Gm = 0.786[GPa]
  th_so = 0.95[mm]
  d_so = 30[mm]
  th_Gel = 250e-3[mm]
  rho_gel = 1000[kg/m^3]
  c_gel = 1500[m/s]

Probes
  bnd1: Boundary "Boundary Probe 1" (disabled) on boundaries 4, 6
    type = maximum
    expr = abs(solid.vel)
    unit = m/s
    frame = spatial
    axisym = 2d
    intsurface = on
    table = default
  dom1: Domain "Domain Probe 1" on all domains
    type = maximum
    expr = abs(solid.u_tZ)
    unit = m/s
    frame = spatial
    axisym = 2d
    intsurface = on
    intvolume = on

Coordinate systems
  ab1: AbsorbingLayer (disabled) on no domains | ScalingType = Cylindrical

Common definitions
  mpf1: ParticipationFactors

Geometry
  geom1 "Geometry 1" (2D axisymmetric, length unit mm)
    r1: Rectangle | size = {d_disc/2, th+th_so+th_Gel}
    pt1: Point (disabled) | p = {5.5, }
    r2: Rectangle | pos = {0, th+th_Gel}; size = {d_so/2, th_so}
    r3: Rectangle | pos = {0, th}; size = {d_disc/2, th_Gel}
    fin: Finalize "Form Union"

Materials
  mat2: Common "Lead Zirconate Titanate (PZT-4) 1" on all domains
    def "Basic"
      relpermittivity = diag{762.5, 762.5, 663.2}
      density = 7500[kg/m^3]
    StrainCharge "Strain-charge form"
      sE = {1.23e-011[1/Pa], -4.05e-012[1/Pa], -5.31e-012[1/Pa], 0[1/Pa], 0[1/Pa], 0[1/Pa], -4.05e-012[1/Pa], 1.23e-011[1/Pa], -5.31e-012[1/Pa], 0[1/Pa], 0[1/Pa], 0[1/Pa], -5.31e-012[1/Pa], -5.31e-012[1/Pa], 1.55e-011[1/Pa], 0[1/Pa], 0[1/Pa], 0[1/Pa], 0[1/Pa], 0[1/Pa], 0[1/Pa], 3.9e-011[1/Pa], 0[1/Pa], 0[1/Pa], 0[1/Pa], 0[1/Pa], 0[1/Pa], 0[1/Pa], 3.9e-011[1/Pa], 0[1/Pa], 0[1/Pa], 0[1/Pa], 0[1/Pa], 0[1/Pa], 0[1/Pa], 3.27e-011[1/Pa]}
      dET = {0[C/N], 0[C/N], -1.23e-010[C/N], 0[C/N], 0[C/N], -1.23e-010[C/N], 0[C/N], 0[C/N], 2.89e-010[C/N], 0[C/N], 4.96e-010[C/N], 0[C/N], 4.96e-010[C/N], 0[C/N], 0[C/N], 0[C/N], 0[C/N], 0[C/N]}
      epsilonrT = diag{1475, 1475, 1300}
      eta_sE = {0, 0, 0, 0, 0, 0, 0, 0, 0, 0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}
      eta_dET = {0, 0, 0, 0, 0, 0, 0, 0, 0, 0, 0, 0, 0, 0, 0, 0, 0, 0}
      eta_epsilonT = 0
    StressCharge "Stress-charge form"
      cE = {CE11, CE12, CE13, 0[Pa], 0[Pa], 0[Pa], CE12, CE11, CE13, 0[Pa], 0[Pa], 0[Pa], CE13, CE13, CE33, 0[Pa], 0[Pa], 0[Pa], 0[Pa], 0[Pa], 0[Pa], CE44, 0[Pa], 0[Pa], 0[Pa], 0[Pa], 0[Pa], 0[Pa], CE44, 0[Pa], 0[Pa], 0[Pa], 0[Pa], 0[Pa], 0[Pa], CE66}
      eES = {0[C/m^2], 0[C/m^2], eE31, 0[C/m^2], 0[C/m^2], eE31, 0[C/m^2], 0[C/m^2], eE33, 0[C/m^2], eE15, 0[C/m^2], eE15, 0[C/m^2], 0[C/m^2], 0[C/m^2], 0[C/m^2], 0[C/m^2]}
      epsilonrS = diag{epsilon11r, epsilon11r, epsilon33r}
      eta_cE = {0, 0, 0, 0, 0, 0, 0, 0, 0, 0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}
      eta_eES = {0, 0, 0, 0, 0, 0, 0, 0, 0, 0, 0, 0, 0, 0, 0, 0, 0, 0}
      eta_epsilonS = 0
  mat3: Common "MaterialSo" on domains 2-4
    def "Basic"
      density = rho_so
    KG "Bulk modulus and shear modulus"
      K = Km
      G = Gm
  mat4: Common "Gel" on domains 2
    def "Basic"
      thermalexpansioncoefficient = alpha_p(T)
      bulkviscosity = muB(T)
      dynamicviscosity = eta(T)
      ratioofspecificheat = gamma_w(T)
      electricconductivity = 5.5e-6[S/m]
      heatcapacity = Cp(T)
      density = rho_gel
      thermalconductivity = k(T)
      soundspeed = c_gel
      eta: Piecewise
        arg = T
        pieces = 
          {273.15, 413.15, 1.3799566804-0.021224019151*T^1+1.3604562827E-4*T^2-4.6454090319E-7*T^3+8.9042735735E-10*T^4-9.0790692686E-13*T^5+3.8457331488E-16*T^6}
          {413.15, 553.75, 0.00401235783-2.10746715E-5*T^1+3.85772275E-8*T^2-2.39730284E-11*T^3}
        argunit = K
        fununit = Pa*s
      Cp: Piecewise | arg = T; pieces = {273.15, 553.75, 12010.1471-80.4072879*T^1+0.309866854*T^2-5.38186884E-4*T^3+3.62536437E-7*T^4}; argunit = K; fununit = J/(kg*K)
      rho: Piecewise
        arg = T
        smooth = contd1
        pieces = 
          {273.15, 293.15, 6.3092789034e-05*T^3-0.0603676398829*T^2+18.9229382407066*T-950.704055329848}
          {293.15, 373.15, 1.0335053319e-05*T^3-0.0133950656345*T^2+4.96928883266*T+432.257114008512}
        argunit = K
        fununit = kg/m^3
      k: Piecewise | arg = T; pieces = {273.15, 553.75, -0.869083936+0.00894880345*T^1-1.58366345E-5*T^2+7.97543259E-9*T^3}; argunit = K; fununit = W/(m*K)
      cs: Interpolation | table = {{273, 1403}, {278, 1427}, {283, 1447}, {293, 1481}, {303, 1507}, {313, 1526}, {323, 1541}, {333, 1552}, {343, 1555}, {353, 1555}, {363, 1550}, {373, 1543}}; interp = piecewisecubic; fununit = m/s; argunit = K
      an1: Analytic | funcname = alpha_p; expr = -1/rho(T)*d(rho(T),T); args = T; fununit = 1/K; argunit = K
      an2: Analytic | funcname = gamma_w; expr = 1+(T/Cp(T))*(alpha_p(T)*cs(T))^2; args = T; fununit = 1; argunit = K
      an3: Analytic | funcname = muB; expr = 2.79*eta(T); args = T; fununit = Pa*s; argunit = K

Physics
  solid: SolidMechanics on domains 1, 3, 4
    dependent variable u = {u, v, w}
    Mode2Daxi.includeTwist = 1
    Mode2Daxi.ModeExtension = 0
    Mode2Daxi.mk = 1
    lemm1: LinearElasticModel "Linear Elastic Material 1" (default) | IsotropicOption = KG
    axi1: AxialSymmetrySolid "Axial Symmetry 1" (default)
    free1: Free (default)
    init1: init "Initial Values 1" (default)
    pzm1: PiezoelectricMaterialModel "Piezoelectric Material 1" on domains 1 | cE_mat = from_mat
  es: Electrostatics on domains 1
    dependent variable V
    PortSweepSettings.zref = 50[ohm]
    ccn1: ChargeConservation (default)
      ConstitutiveRelationDE = RelativePermittivity
      epsilonPrim_mat = userdef
      epsilonPrim = 1
      epsilonBis_mat = userdef
      epsilonBis = 1
      materialType = from_mat
      coordinateSystem = comp1_xz_sys
    axi1: AxialSymmetry (default)
    zc1: ZeroCharge (default)
    init1: init "Initial Values 1" (default)
    ccnp1: ChargeConservationPiezo "Charge Conservation, Piezoelectric 1" on all domains
    term1: Terminal on boundaries 4, 6 | TerminalType = Voltage; V0 = V_input
    gnd1: Ground on boundaries 2
  acpr: PressureAcoustics "Pressure Acoustics, Frequency Domain" on domains 2
    dependent variable p
    EquationSettings.m = 1
    ReferencePressure.ReferenceType = ReferencePressureWater
    fpam1: FrequencyPressureAcousticsModel "Pressure Acoustics 1" (default)
      FluidModel = FrequencyLinearElastic
      LinearElasticOption = crho
      AttenuationType = dBperm
      mu_mat = userdef
      mu = 0
      muB_mat = userdef
      muB = 50
      Z_mat = userdef
      Z = 0
    axi1: AxialSymmetry (default)
    shb1: SoundHard "Sound Hard Boundary (Wall) 1" (default)
    init1: init "Initial Values 1" (default)
    pwr1: PlaneWaveRadiation (disabled) on boundaries 9
    pr1: Pressure on boundaries 9

Multiphysics
  pze1: PiezoelectricEffect on all domains
    InitializePiezoCoupling = 1
    Solid_physics = solid
    Electrostatics_physics = es
  asb1: AcousticStructureBoundary on all boundaries | Acoustics_physics = acpr; Structure_physics = solid

Mesh
  mesh1 "Mesh 1"
    size: MeshSizeDefault | hmax = 1.01; hmin = 0.0045; hcurve = 0.3; hgrad = 1.3
    map1: Map "Mapped 1" on domains 1-4
      size1: Size on domains 1-4 | hmax = Mesh_Size; hmin = Mesh_Size; custom = on
      dis1: Distribution (disabled) on boundaries 3

Studies
  std1 "Study 1"
    freq: Frequency "Frequency Domain" | punit = MHz; plist = range(Fre_I,Step_Fre,Fre_F)

Solver configurations
  sol1 "Solution 1" (study std1)
    v1: Variables "Dependent Variables 1"
    s1: Stationary "Stationary Solver 1" | linpmethod = sol
      dDef: Direct
      p1: Parametric | pname = freq; plistarr = range(Fre_I,Step_Fre,Fre_F); punit = MHz; pcontinuationmode = no
      fc1: FullyCoupled | linsolver = dDef