// COMSOL Multiphysics 6.1.0.282 model "piezoelectric_Disc.mph"
// Outline of the model tree

Parameters
  d_disc = 25[mm]
  th = 0.83[mm]
  Fre_I = 2.3e6[Hz]
  Fre_F = 2.65e6[Hz]
  Step_Fre = 5000[Hz]
  Mesh_Size = th/8
  Fre_re = 2500e3[Hz]
  CE11 = 1 [Pa]
  CE33 = (1.176299099941295e+11 + 4.869749190479133e+06i)[Pa]  // Elasticity CE33
  CE12 = 1 [Pa]
  CE13 = 1 [Pa]
  CE44 = 1 [Pa]
  CE66 = (CE11-CE12)/2
  eE33 = (11.146046581945837 - 0.026152284646954i)[C/m^2]
  eE31 = 1[C/m^2]
  eE15 = 1[C/m^2]
  epsilon33r = 2.012791160000000000000000000000000000000000000665360e+03 - 1.235184610636028e+00i
  epsilon11r = 1
  rho_m = 7500[kg/m^3]
  V_input = 1[V]

Probes
  bnd1: Boundary "Boundary Probe 1" (disabled) on boundaries 3
    type = maximum
    expr = abs(solid.vel)
    unit = m/s
    frame = spatial
    axisym = 2d
    intsurface = on
    table = default
  dom1: Domain "Domain Probe 1" on all domains
    type = maximum
    expr = abs(solid.u_tZ)
    unit = m/s
    frame = spatial
    axisym = 2d
    intsurface = on
    intvolume = on

Coordinate systems
  ab1: AbsorbingLayer (disabled) on no domains | ScalingType = Cylindrical

Common definitions
  mpf1: ParticipationFactors

Geometry
  geom1 "Geometry 1" (2D axisymmetric, length unit mm)
    r1: Rectangle | size = {d_disc/2, th}
    pt1: Point (disabled) | p = {d_disc/4, 0}
    fin: Finalize "Form Union"

Materials
  mat2: Common "Lead Zirconate Titanate (PZT-4) 1" on all domains
    def "Basic"
      relpermittivity = diag{762.5, 762.5, 663.2}
      density = 7500[kg/m^3]
    StrainCharge "Strain-charge form"
      sE = {1.23e-011[1/Pa], -4.05e-012[1/Pa], -5.31e-012[1/Pa], 0[1/Pa], 0[1/Pa], 0[1/Pa], -4.05e-012[1/Pa], 1.23e-011[1/Pa], -5.31e-012[1/Pa], 0[1/Pa], 0[1/Pa], 0[1/Pa], -5.31e-012[1/Pa], -5.31e-012[1/Pa], 1.55e-011[1/Pa], 0[1/Pa], 0[1/Pa], 0[1/Pa], 0[1/Pa], 0[1/Pa], 0[1/Pa], 3.9e-011[1/Pa], 0[1/Pa], 0[1/Pa], 0[1/Pa], 0[1/Pa], 0[1/Pa], 0[1/Pa], 3.9e-011[1/Pa], 0[1/Pa], 0[1/Pa], 0[1/Pa], 0[1/Pa], 0[1/Pa], 0[1/Pa], 3.27e-011[1/Pa]}
      dET = {0[C/N], 0[C/N], -1.23e-010[C/N], 0[C/N], 0[C/N], -1.23e-010[C/N], 0[C/N], 0[C/N], 2.89e-010[C/N], 0[C/N], 4.96e-010[C/N], 0[C/N], 4.96e-010[C/N], 0[C/N], 0[C/N], 0[C/N], 0[C/N], 0[C/N]}
      epsilonrT = diag{1475, 1475, 1300}
      eta_sE = {0, 0, 0, 0, 0, 0, 0, 0, 0, 0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}
      eta_dET = {0, 0, 0, 0, 0, 0, 0, 0, 0, 0, 0, 0, 0, 0, 0, 0, 0, 0}
      eta_epsilonT = 0
    StressCharge "Stress-charge form"
      cE = {CE11, CE12, CE13, 0[Pa], 0[Pa], 0[Pa], CE12, CE11, CE13, 0[Pa], 0[Pa], 0[Pa], CE13, CE13, CE33, 0[Pa], 0[Pa], 0[Pa], 0[Pa], 0[Pa], 0[Pa], CE44, 0[Pa], 0[Pa], 0[Pa], 0[Pa], 0[Pa], 0[Pa], CE44, 0[Pa], 0[Pa], 0[Pa], 0[Pa], 0[Pa], 0[Pa], CE66}
      eES = {0[C/m^2], 0[C/m^2], eE31, 0[C/m^2], 0[C/m^2], eE31, 0[C/m^2], 0[C/m^2], eE33, 0[C/m^2], eE15, 0[C/m^2], eE15, 0[C/m^2], 0[C/m^2], 0[C/m^2], 0[C/m^2], 0[C/m^2]}
      epsilonrS = diag{epsilon11r, epsilon11r, epsilon33r}
      eta_cE = {0, 0, 0, 0, 0, 0, 0, 0, 0, 0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}
      eta_eES = {0, 0, 0, 0, 0, 0, 0, 0, 0, 0, 0, 0, 0, 0, 0, 0, 0, 0}
      eta_epsilonS = 0

Physics
  solid: SolidMechanics on domains 1
    dependent variable u = {u, v, w}
    Mode2Daxi.includeTwist = 1
    lemm1: LinearElasticModel "Linear Elastic Material 1" (default)
    axi1: AxialSymmetrySolid "Axial Symmetry 1" (default)
    free1: Free (default)
    init1: init "Initial Values 1" (default)
    pzm1: PiezoelectricMaterialModel "Piezoelectric Material 1" on domains 1 | cE_mat = from_mat
      mdmp1: MechanicalDamping (disabled) on all domains
        DampingType = LossFactor_cE
        eta_cE_mat = userdef
        eta_cE = {0.2, 0, 0, 0, 0, 0, 0, 0.2, 0, 0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}
        eta_s_mat = from_mat
      dels1: DielectricLoss (disabled) on all domains | eta_epsilonS_mat = userdef; eta_epsilonS = diag{0, 0, 0.1}
  es: Electrostatics on domains 1
    dependent variable V
    PortSweepSettings.zref = 50[ohm]
    ccn1: ChargeConservation (default)
      ConstitutiveRelationDE = RelativePermittivity
      epsilonPrim_mat = userdef
      epsilonPrim = 1
      epsilonBis_mat = userdef
      epsilonBis = 1
      materialType = from_mat
      coordinateSystem = comp1_xz_sys
    axi1: AxialSymmetry (default)
    zc1: ZeroCharge (default)
    init1: init "Initial Values 1" (default)
    ccnp1: ChargeConservationPiezo "Charge Conservation, Piezoelectric 1" on all domains
    term1: Terminal on boundaries 3 | TerminalType = Voltage; V0 = V_input
    gnd1: Ground on boundaries 2

Multiphysics
  pze1: PiezoelectricEffect on all domains
    InitializePiezoCoupling = 1
    Solid_physics = solid
    Electrostatics_physics = es

Mesh
  mesh1 "Mesh 1"
    size: MeshSizeDefault | hmax = 0.838; hmin = 0.00375; hcurve = 0.3; hgrad = 1.3
    map1: Map "Mapped 1" on remaining entities
      size1: Size on entire geometry | hmax = Mesh_Size; hmin = Mesh_Size; custom = on

Studies
  std1 "Study 1"
    freq: Frequency "Frequency Domain" | punit = MHz; plist = range(Fre_I,Step_Fre,Fre_F)

Solver configurations
  sol1 "Solution 1" (study std1)
    v1: Variables "Dependent Variables 1"
    s1: Stationary "Stationary Solver 1" | linpmethod = sol
      dDef: Direct
      p1: Parametric | pname = freq; plistarr = range(Fre_I,Step_Fre,Fre_F); punit = MHz; pcontinuationmode = no
      fc1: FullyCoupled | linsolver = dDef